<?xml version="1.0"?>
<?xml-stylesheet type="text/xsl" href="http://jsbsim.sourceforge.net/JSBSim.xsl"?>
<fdm_config xmlns:xsi="http://www.w3.org/2001/XMLSchema-instance" name="c310" version="2.0" release="ALPHA" xsi:noNamespaceSchemaLocation="http://jsbsim.sourceforge.net/JSBSim.xsd">
	<fileheader>
		<author> AeromatiC++ version 3.3.20 </author>
		<filecreationdate> 21 May 2022 </filecreationdate>
		<version>$Revision: 1.80 $</version>
		<description> Models a c310. </description>
	</fileheader>
	<!--
  File:     c310.xml
  Inputs:
    name:          c310
    type:          Multi-engine Glider, Small Commuter
    stall speed:   73.00 kt
    max weight:    5400.00 lbs
    length:        27.00 ft
    wing:
     span:         35.00 ft
     area:         175.00 ft2
     mean chord:   4.06 ft
     aspect ratio: 7.78:1
     taper ratio:  0.67:1
     incidence:    2.50 degrees
     dihedral:     5.00 degrees
     sweep:        0.00 degrees

    no. engines:   2
    engine type:   Piston Engine
    engine layout: wings

    gear type:     tricycle
    steering type: steering
    retractable?:  yes

  Outputs:
    wing loading:       30.86 lbs/sq-ft
     - thickness ratio: 7.24%
    payload:            1561.80 lbs
    CL-alpha:           5.24 per radian
    CL-0:               0.35
    CL-max:             1.71
    CD-0:               0.02
    K:                  0.04
    Mcrit:              0.72

    min. turn radius    260.48 ft
    max. turn rate:     0.52 deg/s
-->
	<metrics>
		<wingarea unit="FT2">179</wingarea>
		<wingspan unit="FT">35</wingspan>
		<wing_incidence unit="DEG">2.5</wing_incidence>
		<chord unit="FT">5.13</chord>
		<htailarea unit="FT2">28</htailarea>
		<htailarm unit="FT">13.5</htailarm>
		<vtailarea unit="FT2">31.5</vtailarea>
		<vtailarm unit="FT">13.5</vtailarm>
		<location name="AERORP" unit="FT">
			<x>3.12</x>
			<y>0</y>
			<z>-1.12</z>
		</location>
		<location name="EYEPOINT" unit="IN">
			<x>40</x>
			<y>-12</y>
			<z>28</z>
		</location>
		<location name="VRP" unit="IN">
			<x>0</x>
			<y>0</y>
			<z>0</z>
		</location>
	</metrics>

	<mass_balance>
		<ixx unit="SLUG*FT2">8884</ixx>
		<iyy unit="SLUG*FT2">1939</iyy>
		<izz unit="SLUG*FT2">11001</izz>
		<emptywt unit="LBS">2850</emptywt>
		<location name="CG" unit="IN">
			<x>35.56/x>
			<y>0</y>
			<z>-1.12</z>
		</location>

		<pointmass name="Pilot">
			<weight unit="LBS">140</weight>
			<location name="POINTMASS" unit="IN">
				<x>36.25</x>
				<y>-10.5</y>
				<z>4</z>
			</location>
		</pointmass>

		<pointmass name="Copilot">
			<weight unit="LBS">140</weight>
			<location name="POINTMASS" unit="IN">
				<x>36.25</x>
				<y>10.5</y>
				<z>4</z>
			</location>
		</pointmass>

		<pointmass name="seat 3 STD">
			<weight unit="LBS">140</weight>
			<location name="POINTMASS" unit="IN">
				<x>71</x>
				<y>-10.5</y>
				<z>4</z>
			</location>
		</pointmass>

		<pointmass name="seat 4 STD">
			<weight unit="LBS">140</weight>
			<location name="POINTMASS" unit="IN">
				<x>71</x>
				<y>10.5</y>
				<z>4</z>
			</location>
		</pointmass>
<!-- later models only
		<pointmass name="seat 5 OPT">
			<weight unit="LBS">110</weight>
			<location name="POINTMASS" unit="IN">
				<x>95</x>
				<y>-10.5</y>
				<z>4</z>
			</location>
		</pointmass>

		<pointmass name="seat 6 OPT">
			<weight unit="LBS">110</weight>
			<location name="POINTMASS" unit="IN">
				<x>95</x>
				<y>10.5</y>
				<z>4</z>
			</location>
		</pointmass>
-->
		<pointmass name="Baggage STA.96">
			<weight unit="LBS">50</weight>
			<location name="POINTMASS" unit="IN">
				<x>98</x>
				<y>0</y>
				<z>-12</z>
			</location>
		</pointmass>

		<pointmass name="Baggage STA.124">
			<weight unit="LBS">50</weight>
			<location name="POINTMASS" unit="IN">
				<x>125</x>
				<y>0</y>
				<z>-12</z>
			</location>
		</pointmass>
	</mass_balance>

	<propulsion>
		<engine file="Continental-O-470-M">
			<feed>0</feed>

			<thruster file="Hartzell-HC82XF-2">
				<sense> 1 </sense>
				<location unit="IN">
					<x>-22.5</x>
					<y>-76.7</y>
					<z>2.5</z>
				</location>
				<orient unit="DEG">
					<pitch>0</pitch>
					<roll>0</roll>
					<yaw>0</yaw>
				</orient>
			</thruster>
		</engine>

		<engine file="Continental-O-470-M">
			<feed>1</feed>

			<thruster file="Hartzell-HC82XF-2">
				<sense>1</sense>
				<location unit="IN">
					<x>-22.5</x>
					<y>76.7</y>
					<z>2.5</z>
				</location>
				<orient unit="DEG">
					<pitch>0</pitch>
					<roll>0</roll>
					<yaw>0</yaw>
				</orient>
			</thruster>
		</engine>

		<tank type="FUEL" number="0">
			<location unit="IN">
				<x>32.5</x>
				<y>-216</y>
				<z>-14</z>
			</location>
			<capacity unit="LBS">316.2</capacity>
			<contents unit="LBS">100</contents>
			<unusable unit="LBS">6</unusable>
		</tank>

		<tank type="FUEL" number="1">
			<location unit="IN">
				<x>32.5</x>
				<y>216</y>
				<z>-14</z>
			</location>
			<capacity unit="LBS">316.2</capacity>
			<contents unit="LBS">100</contents>
			<unusable unit="LBS">6</unusable>
		</tank>
	</propulsion>

	<ground_reactions>
		<contact type="BOGEY" name="NOSE">
			<location unit="IN">
				<x>-62.7</x>
				<y>0</y>
				<z>-49.2</z>
			</location>
			<static_friction>0.8</static_friction>
			<dynamic_friction>0.5</dynamic_friction>
			<rolling_friction> 0.02 </rolling_friction>
			<spring_coeff unit="LBS/FT">1620</spring_coeff>
			<damping_coeff unit="LBS/FT/SEC">810</damping_coeff>
			<max_steer unit="DEG">55</max_steer>
			<brake_group>NONE</brake_group>
			<retractable>1</retractable>
		</contact>

		<contact type="BOGEY" name="LEFT_MAIN">
			<location unit="IN">
				<x>48.3</x>
				<y>-74.5</y>
				<z>-49.2</z>
			</location>
			<static_friction>0.8</static_friction>
			<dynamic_friction>0.5</dynamic_friction>
			<rolling_friction>0.02</rolling_friction>
			<spring_coeff unit="LBS/FT">5400</spring_coeff>
			<damping_coeff unit="LBS/FT/SEC">2700</damping_coeff>
			<max_steer unit="DEG">0</max_steer>
			<brake_group>LEFT</brake_group>
			<retractable>1</retractable>
		</contact>

		<contact type="BOGEY" name="RIGHT_MAIN">
			<location unit="IN">
				<x>48.3</x>
				<y>74.5</y>
				<z>-49.2</z>
			</location>
			<static_friction>0.8</static_friction>
			<dynamic_friction>0.5</dynamic_friction>
			<rolling_friction>0.02</rolling_friction>
			<spring_coeff unit="LBS/FT">5400</spring_coeff>
			<damping_coeff unit="LBS/FT/SEC">2700</damping_coeff>
			<max_steer unit="DEG">0</max_steer>
			<brake_group>RIGHT</brake_group>
			<retractable>1</retractable>
		</contact>

		<contact type="STRUCTURE" name="LEFT_WING">
			<location unit="IN">
				<x>-6.7</x>
				<y>-214.2</y>
				<z>8.1</z>
			</location>
			<static_friction>0.5</static_friction>
			<dynamic_friction>0.5</dynamic_friction>
			<spring_coeff unit="LBS/FT">5400</spring_coeff>
			<damping_coeff unit="LBS/FT/SEC">2700</damping_coeff>
		</contact>

		<contact type="STRUCTURE" name="RIGHT_WING">
			<location unit="IN">
				<x>-6.7</x>
				<y>214.2</y>
				<z>8.1</z>
			</location>
			<static_friction>0.5</static_friction>
			<dynamic_friction>0.5</dynamic_friction>
			<spring_coeff unit="LBS/FT">5400</spring_coeff>
			<damping_coeff unit="LBS/FT/SEC">2700</damping_coeff>
		</contact>
	</ground_reactions>

	<flight_control file="Systems/fdm-fcs.xml"/>

	<aerodynamics file="Systems/fdm-aerodynamics.xml"/>

	<external_reactions>
	</external_reactions>
</fdm_config>
